*Heading
** Job name: Lamina_fine_06_10_25 Model name: Job-45DEG
** Generated by: Abaqus/CAE 2024
*Preprint, echo=NO, model=NO, history=NO, contact=NO
**
*Node
      1,         32.5,           0.,         0.25
      2,         32.5,          20.,         0.25
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*Element, type=C3D8
   1, 1691, 3501,   20,   19, 3894, 5704,  288,  289
   2,  189, 1818, 1691,  190,  291, 4021, 3894,  290
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*Nset, nset=laminate, generate
     1,  51522,      1
*Elset, elset=laminate, generate
     1,  25470,      1
*User element, nodes=8, type=U1, properties=9, coordinates=3, var=80
11,12,13,14,15
*ELEMENT, TYPE=U1, ELSET=SOLID1
*include, input=VisualMesh_Lamina_fine_06_10_25.inp
*UEL PROPERTY, ELSET=SOLID1
0.1, 0.2974, 1.30, 0.778, 81.5, 106.3, 0.0, 1, 0.0
*Orientation, name=Ori-1
          1.,           0.,           0.,           0.,           1.,           0.
3, 0.
*Orientation, name=Ori-2
          1.,           0.,           0.,           0.,           1.,           0.
3, 0.
** Section: Section-1
*Solid Section, elset=laminate, orientation=Ori-1, material=Material-1
,
**
*Nset, nset=Back_bottom
 4, 7
*Nset, nset=Back_left
   7,   8
*Nset, nset=Loading_face
  11,  12,  15,  16, 494, 495
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*Nset, nset=bc_back
   3,   4,   7,   8, 150, 151
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*Amplitude, name=AMP-1, time=TOTAL TIME
             0.,              0.,           1.,              1.
**
** MATERIALS
**
*Material, name=MATERIAL-1
*Density
 2e-08,
*Depvar
     80,
*User Material, constants=18
171420.,  9080.,  5390.,   0.32,   0.45,270000.,    0.2, 2326
 1017,   62,  250,   100,     1., 0.2974,    1.3,  0.778
   81.5,  106.3
**User Material, constants=18
** 171420.,  9080.,  5390.,   0.32,   0.45,270000.,    0.2, 2326
** 1017,   62,  250,   100,     1., 0.4574,    2.19,  1.278
**   121.5,  166.3
**
** BOUNDARY CONDITIONS
**
** Name: BC-9 Type: Displacement/Rotation
*Boundary
Back_left, 3, 3
** Name: BC-10 Type: Displacement/Rotation
*Boundary
Back_bottom, 2, 2
Back_bottom, 3, 3
** Name: Disp-BC-1 Type: Displacement/Rotation
*Boundary
bc_back, 1, 1
** ----------------------------------------------------------------
*Step,name=Step-1, nlgeom=NO, inc=1000000
*Static
1., 1., 1e-05, 1.
*Controls, reset
*Controls, parameters=time incrementation
 10000,10000,8000,12000,500, 5, , , ,
 , , , , , , , ,
*Controls, parameters=line search
1000, 1. ,0.0001 , ,0.01
*Controls, parameters=field, field=displacement
0.05, 1., , , , , ,
*Controls, parameters=field, field=temperature
0.1, 1., , , , , ,
**
** BOUNDARY CONDITIONS
**
** Name: BC-6 Type: Displacement/Rotation
*Boundary
Loading_face, 1, 1, 0.3
**
** OUTPUT REQUESTS
**
*Restart, write, frequency=0
**
** FIELD OUTPUT: F-Output-1
**
*Output, field, number interval=10
*Node Output
RF, U, NT
*Element Output, directions=YES
E, S, SDV
**
** HISTORY OUTPUT: H-Output-1
**
*Output, history, variable=PRESELECT
*End Step
** ----------------------------------------------------------------
*Step,name=Step-2, nlgeom=NO, inc=10000000
*Static
0.1, 1., 1e-05, 0.05
*Controls, reset
*Controls, parameters=time incrementation
 10000,10000,8000,12000,500, 5, , , ,
 , , , , , , , ,
*Controls, parameters=line search
1000, 1. ,0.0001 , ,0.01
*Controls, parameters=field, field=displacement
0.05, 1., , , , , ,
*Controls, parameters=field, field=temperature
0.1, 1., , , , , ,
**
** BOUNDARY CONDITIONS
**
** Name: BC-6 Type: Displacement/Rotation
*Boundary
Loading_face, 1, 1, 0.44
**
** OUTPUT REQUESTS
**
*Restart, write, frequency=0
**
** FIELD OUTPUT: F-Output-1
**
*Output, field, number interval=50
*Node Output
RF, U, NT
*Element Output, directions=YES
E, S, SDV
**
** HISTORY OUTPUT: H-Output-1
**
*Output, history, variable=PRESELECT
*End Step
** ----------------------------------------------------------------
*Step,name=Step-3, nlgeom=NO, inc=10000000
*Static
0.02, 1., 1e-05, 0.02
*Controls, reset
*Controls, parameters=time incrementation
 10000,10000,8000,12000,500, 5, , , ,
 , , , , , , , ,
*Controls, parameters=line search
1000, 1. ,0.0001 , ,0.01
*Controls, parameters=field, field=displacement
0.05, 1., , , , , ,
*Controls, parameters=field, field=temperature
0.5, 1., , , , , ,
**
** BOUNDARY CONDITIONS
**
** Name: BC-6 Type: Displacement/Rotation
*Boundary
Loading_face, 1, 1, 0.56
**
** OUTPUT REQUESTS
**
*Restart, write, frequency=1
**
** FIELD OUTPUT: F-Output-1
**
*Output, field, number interval=50
*Node Output
RF, U, NT
*Element Output, directions=YES
E, S, SDV
**
** HISTORY OUTPUT: H-Output-1
**
*Output, history, variable=PRESELECT
*End Step
