*Heading
** Job name: SENT_0DEG Model name: SENT_0DEG
** Generated by: Abaqus/CAE 6.14-4
*Preprint, echo=NO, model=NO, history=NO, contact=NO
**
*Node
      1,          0.5,   1.00999999, 0.0199999996
      2,          0.5,           2., 0.0199999996
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*Element, type=C3D8
   1,   195,  1493,  1566,   196,  4924, 28855, 28928,  4923
   2,    24,    23,  1576,  1488,  4994,  4993, 28938, 28850
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*User element, nodes=8, type=U1, properties=9, coordinates=3, var=80
11,12,13,14,15
*ELEMENT, TYPE=U1, ELSET=SOLID1
*include, input=VisualMesh_SENT_0DEG.inp
*UEL PROPERTY, ELSET=SOLID1
0.1, 0.2974, 1.30, 0.778, 81.5, 106.3, 0.0, 1, 0.0
*Nset, nset=SENT, generate
     1,  42048,      1
*Elset, elset=SENT, generate
     1,  27566,      1
*Orientation, name=Ori-1
          1.,           0.,           0.,           0.,           1.,           0.
3, 0.
*Orientation, name=Ori-2
          1.,           0.,           0.,           0.,           1.,           0.
3, 45.
*Orientation, name=Ori-3
          1.,           0.,           0.,           0.,           1.,           0.
3, 90.
** Section: Section-1
*Solid Section, elset=SENT, orientation=Ori-1, material=Material-1
,
**
*Nset, nset=Back_Bottom_node
 19,
*Nset, nset=Bottom_surface
   10,   11,   13,   16,   18,   19
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*Elset, elset=Bottom_surface
  3857,  3858,  3865,  3869,  3870,  3876
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*Nset, nset=Front_bottom_node
 16,
*Nset, nset=Top_surface
    2,    3,    5,    8,   17,   20
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*Elset, elset=Top_surface
    86,    87,    95,   101,   102,   111
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**
** MATERIALS
**
*Material, name=Material-1
*Density
 2e-08,
*Depvar
     80,
*User Material, constants=18
171420.,  9080.,  5390.,   0.32,   0.45,270000.,    0.2, 2326
 1017,   62,  250,   100,     1., 0.2974,    1.3,  0.778
   81.5,  106.3
**
** BOUNDARY CONDITIONS
**
** Name: BC-2 Type: Displacement/Rotation
*Boundary
Bottom_surface, 2, 2
** Name: BC-3 Type: Displacement/Rotation
*Boundary
Front_bottom_node, 1, 1
** Name: BC-4 Type: Displacement/Rotation
*Boundary
Back_Bottom_node, 3, 3
** ----------------------------------------------------------------
**
** STEP: Step-1
**
*Step,name=Step-1, nlgeom=NO, inc=1000000
*Static
1., 1., 1e-05, 1.
*Controls, reset
*Controls, parameters=time incrementation
 10000,10000,8000,12000,500, 5, , , ,
 , , , , , , , ,
*Controls, parameters=line search
1000, 1. ,0.0001 , ,0.01
*Controls, parameters=field, field=displacement
0.05, 1., , , , , ,
*Controls, parameters=field, field=temperature
0.1, 1., , , , , ,
**
** BOUNDARY CONDITIONS
**
** Name: BC-1 Type: Displacement/Rotation
*Boundary
Top_surface, 2, 2, 0.0075
**
** OUTPUT REQUESTS
**
*Restart, write, frequency=0
**
** FIELD OUTPUT: F-Output-1
**
*Output, field, number interval=10
*Node Output
RF, U, NT
*Element Output, directions=YES
E, S, SDV
**
** HISTORY OUTPUT: H-Output-1
**
*Output, history, variable=PRESELECT
*End Step
**
** STEP: Step-2
**
*Step,name=Step-2, nlgeom=NO, inc=1000000
*Static
0.05, 1., 1e-05, 0.05
*Controls, reset
*Controls, parameters=time incrementation
 10000,10000,8000,12000,500, 5, , , ,
 , , , , , , , ,
*Controls, parameters=line search
1000, 1. ,0.0001 , ,0.01
*Controls, parameters=field, field=displacement
0.05, 1., , , , , ,
*Controls, parameters=field, field=temperature
0.1, 1., , , , , ,
**
** BOUNDARY CONDITIONS
**
** Name: BC-1 Type: Displacement/Rotation
*Boundary
Top_surface, 2, 2, 0.035
**
** OUTPUT REQUESTS
**
*Restart, write, frequency=0
**
** FIELD OUTPUT: F-Output-1
**
*Output, field, number interval=20
*Node Output
RF, U, NT
*Element Output, directions=YES
E, S, SDV
**
** HISTORY OUTPUT: H-Output-1
**
*Output, history, variable=PRESELECT
*End Step
**
** STEP: Step-3
**
*Step,name=Step-3, nlgeom=NO, inc=1000000
*Static
0.02, 1., 1e-05, 0.02
*Controls, reset
*Controls, parameters=time incrementation
 10000,10000,8000,12000,500, 5, , , ,
 , , , , , , , ,
*Controls, parameters=line search
1000, 1. ,0.0001 , ,0.01
*Controls, parameters=field, field=displacement
0.1, 1., , , , , ,
*Controls, parameters=field, field=temperature
0.3, 1., , , , , ,
**
** BOUNDARY CONDITIONS
**
** Name: BC-1 Type: Displacement/Rotation
*Boundary
Top_surface, 2, 2, 0.041
**
** OUTPUT REQUESTS
**
*Restart, write, frequency=0
**
** FIELD OUTPUT: F-Output-1
**
*Output, field, number interval=50
*Node Output
RF, U, NT
*Element Output, directions=YES
E, S, SDV
**
** HISTORY OUTPUT: H-Output-1
**
*Output, history, variable=PRESELECT
*End Step
